P_out := 4000 W
V_in := 800 V
V_out := 80 V
B_max := 0.2 T
f_s := 100000 Hz
η := 0.9
J := 300 A/cm^2 = 3 A/mm^2
P_in := P_out/η = 4444.44 W
# 电流计算 | 视在功率
I_inavg := P_in/V_in = 5.55556 A
I_prms := I_inavg*1.11 = 6.16667 A
P_t := P_in + P_out = 8444.44 W
I_outavg := P_out/V_out = 50 A
I_srms := I_outavg*1.11 = 55.5 A
K_f := 4  # Ap计算：
K_u := 0.3
A_p := P_t/(K_f*K_u*B_max*f_s*J) = 11.7284 cm^4
# 磁芯定义：（PQ5050） | 札数计算：
A_e := 243 mm^2
N_pclac := V_in/(4*f_s*B_max*A_e) = 41.1523
A_w := 371 mm^2
A_pc := A_e*A_w = 90153 mm^4
n := V_in/V_out = 10
验算：
N_p := ceil(N_pclac) = 42
B_work := V_in/(4*f_s*N_p*A_e) = 0.195963 T
N_s := round(N_p/n) = 4
# 最大漆包线直径： | 初级侧的导线面积：
δ := (66.1/sqrt(f_s/Hz)) mm = 0.209027 mm
A_cup := I_prms/J = 2.05556 mm^2
R_cup := 2*sqrt(A_cup/π) = 1.61778 mm
次级侧的导线面积：
D_max := 2*δ = 0.418053 mm
A_cus := I_srms/J = 18.5 mm^2
R_cus := 2*sqrt(A_cus/π) = 4.85334 mm
漏感：
u := 4*π*10^-7 H/m
b_w := 18.5 mm
l_w := 13.5 mm
# 初级和次级铜线层的总物理厚度 | 初次级之间的主绝缘层厚度
h_cu := 10 mm
h_ins := 2 mm
L_k := u*N_p^2*l_w/b_w*(h_cu/3 + h_ins) = 8.62719 μH
