C_sw := 170 pF
t_dm := 0.05/(200000 Hz) = 250 ns
t_d := 100 ns
L_m := 130 μH
f_sw := t_d/(8*C_sw*L_m) = 565611 Hz
f_se := 500000 Hz
L_mm := t_d/(8*C_sw*f_se) = 147.059 μH
L_r := 15 μH
C_r := 1/(4*π^2*L_r*1.1*f_sw^2) = 4.79867 nF
